*Heading
** Job name: shear_iso_ML Model name: plate_shear
** Generated by: Abaqus/CAE 6.14-2
*Preprint, echo=NO, model=NO, history=NO, contact=NO
**
** PARTS
**
*Part, name=Part-1
*End Part
**
**
** ASSEMBLY
**
*Assembly, name=Assembly
**
*Instance, name=Part-1-1, part=Part-1
*Node
      1,           5.,           5.,           1.
      2,           5.,           4.,           1.
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*Element, type=C3D8
  1,  23,  24,  35,  34,   1,   2,  13,  12
  2,  24,  25,  36,  35,   2,   3,  14,  13
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*Nset, nset=Set-1, generate
   1,  242,    1
*Elset, elset=Set-1, generate
   1,  100,    1
*Nset, nset=Set-2, generate
   1,  242,    1
*Elset, elset=Set-2, generate
   1,  100,    1
** Section: Section-ML
*Solid Section, elset=Set-2, material=Material-ML
,
*End Instance
**
*Nset, nset=Set-3, instance=Part-1-1, generate
  11,  242,   11
*Elset, elset=Set-3, instance=Part-1-1, generate
  10,  100,   10
*Nset, nset=Set-4, instance=Part-1-1
 231, 242
*Elset, elset=Set-4, instance=Part-1-1
 100,
*Nset, nset=Set-5, instance=Part-1-1, generate
  22,  242,   22
*Elset, elset=Set-5, instance=Part-1-1, generate
  10,  100,   10
*Nset, nset=Set-6, instance=Part-1-1, generate
   1,  232,   11
*Elset, elset=Set-6, instance=Part-1-1, generate
  1,  91,  10
*End Assembly
**
** MATERIALS
**
*Material, name=Material-J2
*Elastic
200000., 0.3
*Plastic
 60.0,0.
*Material, name=Material-ML
*Depvar
     20,
*User Material, constants=33520
*include, input=models/abq_ML-CPFEM-Random-Texture-cpfem-svm.csv
**
** BOUNDARY CONDITIONS
**
** Name: BC-1 Type: Displacement/Rotation
*Boundary
Set-3, 1, 1
Set-3, 2, 2
** Name: BC-3 Type: Displacement/Rotation
*Boundary
Set-5, 3, 3
Set-5, 4, 4
** ----------------------------------------------------------------
**
** STEP: Step-1
**
*Step, name=Step-1, nlgeom=YES, inc=100000
*Static
0.01, 1., 1e-05, 0.01
**
** BOUNDARY CONDITIONS
**
** Name: BC-4 Type: Displacement/Rotation
*Boundary
Set-6, 1, 1, 0.05
Set-6, 2, 2
**
** OUTPUT REQUESTS
**
*Restart, write, frequency=0
**
** FIELD OUTPUT: F-Output-1
**
*Output, field
*Node Output
RF, U
*Element Output, directions=YES
E, MISES, PE, PEEQ, S, SDV
**
** HISTORY OUTPUT: H-Output-1
**
*Output, history, variable=PRESELECT
*End Step
